Libelle
0.00                  !   Mach
0     0     0.0       !   iYsym  iZsym  Zsym
9.801 0.6534  15.0    !   Sref   Cref   Bref   reference area, chord, span
0.0  0.0   0.0        !   Xref   Yref   Zref   moment reference location (arb.)
#
#==============================================================
#
SURFACE
Wing
9  1  9  1 ! Nchord   Cspace   Nspan  Sspace
#
# reflect image wing about y=0 plane
YDUPLICATE
     0.00000
#
# twist angle bias for whole surface
ANGLE
     2.00000

TRANSLATE
1.7 0 0
#
#--------------------------------------------------------------
#    Xle         Yle         Zle         chord       angle
SECTION
    0        0.0        0.0         0.90        0.000

AFIL
E:\PRD PLANEUR\AVL\runs\Libelle.dat

#-----------------------------
SECTION
    0.0586       4.4        0.269        0.63        0.000

AFIL
E:\PRD PLANEUR\AVL\runs\Libelle.dat

#Cname   Cgain  Xhinge  HingeVec       SgnDup

CONTROL
aileron  -1.0   0.808    0.0 1.0 0.0   -1.0

#-----------------------------
SECTION
    0.1       7.5        0.459        0.36        0.000

AFIL
E:\PRD PLANEUR\AVL\runs\Libelle.dat

#Cname   Cgain  Xhinge  HingeVec       SgnDup

CONTROL
aileron  -1.0   0.8    0.0 1.0 0.0   -1.0

#
#==============================================================
#
SURFACE
H-Stab
9  1  9  1 ! Nchord   Cspace   Nspan  Sspace
#
# reflect image wing about y=0 plane
YDUPLICATE
     0.00000
#
# twist angle bias for whole surface
ANGLE
     -2.00000

TRANSLATE
5.76 0 0.30
#
#--------------------------------------------------------------
#    Xle         Yle         Zle         chord       angle
SECTION
    0        0.0        0.0         0.555        0.000

AFIL
E:\PRD PLANEUR\AVL\runs\Libelle2.dat

#Cname   Cgain  Xhinge  HingeVec       SgnDup

CONTROL
elevator  1.0   0.73    0.0 1.0 0.0   1.0

#-----------------------------
SECTION
    0.185       1.25        0.0        0.370        0.000

AFIL
E:\PRD PLANEUR\AVL\runs\Libelle2.dat

#Cname   Cgain  Xhinge  HingeVec       SgnDup

CONTROL
elevator  1.0   0.73    0.0 1.0 0.0   1.0

#
#==============================================================
#
SURFACE
V-Stab
9  1  9  1 ! Nchord   Cspace   Nspan  Sspace
#
# x,y,z bias for whole surface
TRANSLATE
   5.57    0.00000     0.00000

#-----------------------------
SECTION
   0           0.0        0.0         0.998        0.000

CONTROL
rudder    1.0    0.59    0.0 0.0 1.0
#-----------------------------
SECTION
   0.40441           0.0        1.3         0.55        0.000

CONTROL
rudder    1.0    0.64    0.0 0.0 1.0
#==============================================================
SURFACE
Fuselage H
9  1  9  1 ! Nchord   Cspace   Nspan  Sspace


COMPONENT
1

YDUPLICATE
0.0

SCALE
1.0   1.0  1.0

TRANSLATE
0.0   0.0   0.0

SECTION
#Xle   Yle    Zle      Chord   Ainc  Nspanwise  Sspace
 0.0   0.0    0.0      6.2   0.    1          0.

SECTION
#Xle   Yle    Zle      Chord   Ainc  Nspanwise  Sspace
 0.31   0.19    0.0    2.83   0.    1          0.

SECTION
#Xle    Yle    Zle     Chord   Ainc  Nspanwise  Sspace
 0.87   0.27    0.0    0.8   0.    1          0.


#--------------------------------------------------
SURFACE
Fuselage V Bottom
9  1  9  1 ! Nchord   Cspace   Nspan  Sspace

NOWAKE

COMPONENT
1

SCALE
1.0   1.0  1.0

TRANSLATE
0.0   0.0   0.0

SECTION
#Xle    Yle    Zle     Chord   Ainc  Nspanwise  Sspace
 0.87   0    -0.33    0.8   0.    1          0.

SECTION
#Xle   Yle    Zle      Chord   Ainc  Nspanwise  Sspace
 0.31   0    -0.16    2.83   0.    1          0.

SECTION
#Xle   Yle    Zle      Chord   Ainc  Nspanwise  Sspace
 0.0   0.0    0.0      6.2   0.    1          0.

#--------------------------------------------------
SURFACE
Fuselage V Top
9  1  9  1 ! Nchord   Cspace   Nspan  Sspace

COMPONENT
1

SCALE
1.0   1.0  1.0

TRANSLATE
0.0   0.0   0.0

SECTION
#Xle   Yle    Zle      Chord   Ainc  Nspanwise  Sspace
 0.0   0.0    0.0      6.2   0.    1          0.

SECTION
#Xle    Yle    Zle     Chord   Ainc  Nspanwise  Sspace
 0.87   0    0.35    1.36    0.    1          0.

SECTION
#Xle    Yle    Zle     Chord   Ainc  Nspanwise  Sspace
 1.67   0    0.5    0.1   0.    1          0.
