Libelle
0.00                  !   Mach
0     0     0.0       !   iYsym  iZsym  Zsym
9.801 0.6534  15.0    !   Sref   Cref   Bref   reference area, chord, span
0.0  0.0   0.0        !   Xref   Yref   Zref   moment reference location (arb.)
#
#==============================================================
#
SURFACE
Wing
10  1.0  22  1.0   ! Nchord   Cspace   Nspan  Sspace
#
# reflect image wing about y=0 plane
YDUPLICATE
     0.00000
#
# twist angle bias for whole surface
ANGLE
     2.00000

TRANSLATE
1.7 0 0
#
#--------------------------------------------------------------
#    Xle         Yle         Zle         chord       angle
SECTION
    0        0.0        0.0         0.90        0.000

AFIL
E:\PRD PLANEUR\AVL\runs\Libelle.dat

#-----------------------------
SECTION
    0.0586       4.4        0.269        0.63        0.000

AFIL
E:\PRD PLANEUR\AVL\runs\Libelle.dat

#Cname   Cgain  Xhinge  HingeVec       SgnDup

CONTROL
aileron  -1.0   0.808    0.0 1.0 0.0   -1.0

#-----------------------------
SECTION
    0.1       7.5        0.459        0.36        0.000

AFIL
E:\PRD PLANEUR\AVL\runs\Libelle.dat

#Cname   Cgain  Xhinge  HingeVec       SgnDup

CONTROL
aileron  -1.0   0.8    0.0 1.0 0.0   -1.0

#
#==============================================================
#
SURFACE
H-Stab
8  1.0  5  1.0   ! Nchord   Cspace   Nspan  Sspace
#
# reflect image wing about y=0 plane
YDUPLICATE
     0.00000
#
# twist angle bias for whole surface
ANGLE
     -2.00000

TRANSLATE
5.76 0 0.30
#
#--------------------------------------------------------------
#    Xle         Yle         Zle         chord       angle
SECTION
    0        0.0        0.0         0.555        0.000

AFIL
E:\PRD PLANEUR\AVL\runs\Libelle2.dat

#Cname   Cgain  Xhinge  HingeVec       SgnDup

CONTROL
aileron  1.0   0.73    0.0 1.0 0.0   1.0

#-----------------------------
SECTION
    0.185       1.25        0.0        0.370        0.000

AFIL
E:\PRD PLANEUR\AVL\runs\Libelle2.dat

#Cname   Cgain  Xhinge  HingeVec       SgnDup

CONTROL
aileron  1.0   0.73    0.0 1.0 0.0   1.0

#
#==============================================================
#
SURFACE
V-Stab
8  1.0  14  1  ! Nchord   Cspace
#
# x,y,z bias for whole surface
TRANSLATE
   5.57    0.00000     0.00000

#-----------------------------
SECTION
   0           0.0        0.0         0.998        0.000

CONTROL
rudder    1.0    0.59    0.0 0.0 1.0
#-----------------------------
SECTION
   0.40441           0.0        1.3         0.55        0.000

CONTROL
rudder    1.0    0.64    0.0 0.0 1.0
#==============================================================
